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/batch
! ANSYS input file written by Workbench version 2023 R1
! File used for geometry attach: C:\Users\vivek\OneDrive\Desktop\RE_glasses\glass_Assembly.STEP
/title,Stress_Strain_test--Static Structural (A5)
/COM,/COM,     ANSYSMotion, 2023.1
/com,--- Data in consistent NMM units. See Solving Units in the help system for more information.
/units,MPA
/prep7
! Turn off shape checking because checks already performed inside WB mesher.
! See help system for more information.
SHPP,OFF,,NOWARN
etcon,set             ! allow ANSYS to choose best KEYOP's for 180x elements, resets any applicable keyopt to MAPDL defaults
/com,*********** Nodes for the whole assembly ***********
nblock,3,,85384
(1i9,3e20.9e3)
        1     4.409523241E+01     3.686427264E+01    -9.662361169E+00
        2     4.409523241E+01     3.686427264E+01    -1.016236117E+01
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-1
/com,*********** Elements for Body 1 "frame2|Cut-Extrude3" ***********
et,1,187
eblock,19,solid,,57
(19i9)
        1        1        1        1        0        0        0        0       10        0      133      389      402      403      390      483      525      484      478
      489      490
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-1
/com,*********** Elements for Body 2 "frame2|Thicken1" ***********
et,2,187
eblock,19,solid,,8694
(19i9)
        2        2        2        2        0        0        0        0       10        0    14084    29761    29797    31109    29798    38705    38964    38710    38706
    38959    38969
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-1
/com,*********** Elements for Body 3 "frame2|Thicken3" ***********
et,3,187
eblock,19,solid,,8572
(19i9)
        3        3        3        3        0        0        0        0       10        0     5512    12377    13710    12442    12443    21214    21683    21210    21211
    21690    21678
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-1
/com,*********** Elements for Body 4 "frame2|Mirror1" ***********
et,4,187
eblock,19,solid,,10841
(19i9)
        4        4        4        4        0        0        0        0       10        0    27688    57725    59527    59808    59529    69111    77214    69114    69112
    77211    77220
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-1
/com,*********** Elements for Body 5 "frame2|Mirror3" ***********
et,5,187
eblock,19,solid,,56
(19i9)
        5        5        5        5        0        0        0        0       10        0      190      547      558      548      557      660      664      656      659
      679      663
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-1
/com,*********** Elements for Body 6 "handle1|Fillet1" ***********
et,6,187
eblock,19,solid,,4910
(19i9)
        6        6        6        6        0        0        0        0       10        0      546     2177     2666     3084     2944     7598     9796     7601     7600
     9794    11014
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-1
/com,*********** Elements for Body 7 "handle1|Boss-Extrude1" ***********
et,7,187
eblock,19,solid,,60
(19i9)
        7        7        7        7        0        0        0        0       10        0        1        7       13       29       30       78      104       79       80
      105      153
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-1
/com,*********** Elements for Body 8 "bolt|Boss-Extrude2" ***********
et,8,187
eblock,19,solid,,114
(19i9)
        8        8        8        8        0        0        0        0       10        0      432     1151     1196     1199     1153     1203     1404     1204     1200
     1212     1213
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-1
/com,*********** Elements for Body 9 "nut|Cut-Extrude1" ***********
et,9,187
eblock,19,solid,,72
(19i9)
        9        9        9        9        0        0        0        0       10        0       61      158      167      162      180      221      238      220      222
      270      240
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-1
/com,*********** Elements for Body 10 "bolt|Boss-Extrude2[2]" ***********
et,10,187
eblock,19,solid,,114
(19i9)
       10       10       10       10        0        0        0        0       10        0      318      896      941      944      898      948     1149      949      945
      957      958
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-1
/com,*********** Elements for Body 11 "nut|Cut-Extrude1[2]" ***********
et,11,187
eblock,19,solid,,72
(19i9)
       11       11       11       11        0        0        0        0       10        0      246      683      692      687      705      746      763      745      747
      795      765
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-1
/com,*********** Elements for Body 12 "handle2|Fillet1" ***********
et,12,187
eblock,19,solid,,4910
(19i9)
       12       12       12       12        0        0        0        0       10        0    22778    47080    47569    47987    47847    52501    54699    52504    52503
    54697    55917
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-1
/com,*********** Elements for Body 13 "handle2|Boss-Extrude1" ***********
et,13,187
eblock,19,solid,,56
(19i9)
       13       13       13       13        0        0        0        0       10        0     5456    11142    11165    11146    11171    11184    11211    11179    11185
    11283    11213
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-1
/com,*********** Send User Defined Coordinate System(s) ***********
csys,0
toffst,273.15,  ! Temperature offset from absolute zero
/com,*********** Set Reference Temperature ***********
tref,22.
/com,*********** Send Materials ***********
Temperature = 'TEMP' ! Temperature
MP,DENS,1,7.85e-09,	! tonne mm^-3
MP,ALPX,1,1.2e-05,	! C^-1
MP,C,1,434000000,	! mm^2 s^-2 C^-1
MP,KXX,1,60.5,	! tonne mm s^-3 C^-1
MP,RSVX,1,0.00017,	! ohm mm
MP,EX,1,200000,	! tonne s^-2 mm^-1
MP,NUXY,1,0.3,
MP,MURX,1,10000,

MP,DENS,2,1.2e-09,	! tonne mm^-3
MP,EX,2,2390,	! tonne s^-2 mm^-1
MP,NUXY,2,0.37,

MP,DENS,3,1.2e-09,	! tonne mm^-3
MP,EX,3,2390,	! tonne s^-2 mm^-1
MP,NUXY,3,0.37,

MP,DENS,4,1.15e-09,	! tonne mm^-3
MP,EX,4,1500,	! tonne s^-2 mm^-1
MP,NUXY,4,0.38,

Temperature = 'TEMP' ! Temperature
MP,DENS,5,7.85e-09,	! tonne mm^-3
MP,ALPX,5,1.2e-05,	! C^-1
MP,C,5,434000000,	! mm^2 s^-2 C^-1
MP,KXX,5,60.5,	! tonne mm s^-3 C^-1
MP,RSVX,5,0.00017,	! ohm mm
MP,EX,5,200000,	! tonne s^-2 mm^-1
MP,NUXY,5,0.3,
MP,MURX,5,10000,

MP,DENS,6,1.15e-09,	! tonne mm^-3
MP,EX,6,1500,	! tonne s^-2 mm^-1
MP,NUXY,6,0.38,

Temperature = 'TEMP' ! Temperature
MP,DENS,7,7.85e-09,	! tonne mm^-3
MP,ALPX,7,1.2e-05,	! C^-1
MP,C,7,434000000,	! mm^2 s^-2 C^-1
MP,KXX,7,60.5,	! tonne mm s^-3 C^-1
MP,RSVX,7,0.00017,	! ohm mm
MP,EX,7,200000,	! tonne s^-2 mm^-1
MP,NUXY,7,0.3,
MP,MURX,7,10000,

Temperature = 'TEMP' ! Temperature
MP,DENS,8,7.85e-09,	! tonne mm^-3
MP,ALPX,8,1.2e-05,	! C^-1
MP,C,8,434000000,	! mm^2 s^-2 C^-1
MP,KXX,8,60.5,	! tonne mm s^-3 C^-1
MP,RSVX,8,0.00017,	! ohm mm
MP,EX,8,200000,	! tonne s^-2 mm^-1
MP,NUXY,8,0.3,
MP,MURX,8,10000,

Temperature = 'TEMP' ! Temperature
MP,DENS,9,7.85e-09,	! tonne mm^-3
MP,ALPX,9,1.2e-05,	! C^-1
MP,C,9,434000000,	! mm^2 s^-2 C^-1
MP,KXX,9,60.5,	! tonne mm s^-3 C^-1
MP,RSVX,9,0.00017,	! ohm mm
MP,EX,9,200000,	! tonne s^-2 mm^-1
MP,NUXY,9,0.3,
MP,MURX,9,10000,

Temperature = 'TEMP' ! Temperature
MP,DENS,10,7.85e-09,	! tonne mm^-3
MP,ALPX,10,1.2e-05,	! C^-1
MP,C,10,434000000,	! mm^2 s^-2 C^-1
MP,KXX,10,60.5,	! tonne mm s^-3 C^-1
MP,RSVX,10,0.00017,	! ohm mm
MP,EX,10,200000,	! tonne s^-2 mm^-1
MP,NUXY,10,0.3,
MP,MURX,10,10000,

Temperature = 'TEMP' ! Temperature
MP,DENS,11,7.85e-09,	! tonne mm^-3
MP,ALPX,11,1.2e-05,	! C^-1
MP,C,11,434000000,	! mm^2 s^-2 C^-1
MP,KXX,11,60.5,	! tonne mm s^-3 C^-1
MP,RSVX,11,0.00017,	! ohm mm
MP,EX,11,200000,	! tonne s^-2 mm^-1
MP,NUXY,11,0.3,
MP,MURX,11,10000,

Temperature = 'TEMP' ! Temperature
MP,DENS,12,7.85e-09,	! tonne mm^-3
MP,ALPX,12,1.2e-05,	! C^-1
MP,C,12,434000000,	! mm^2 s^-2 C^-1
MP,KXX,12,60.5,	! tonne mm s^-3 C^-1
MP,RSVX,12,0.00017,	! ohm mm
MP,EX,12,200000,	! tonne s^-2 mm^-1
MP,NUXY,12,0.3,
MP,MURX,12,10000,

Temperature = 'TEMP' ! Temperature
MP,DENS,13,7.85e-09,	! tonne mm^-3
MP,ALPX,13,1.2e-05,	! C^-1
MP,C,13,434000000,	! mm^2 s^-2 C^-1
MP,KXX,13,60.5,	! tonne mm s^-3 C^-1
MP,RSVX,13,0.00017,	! ohm mm
MP,EX,13,200000,	! tonne s^-2 mm^-1
MP,NUXY,13,0.3,
MP,MURX,13,10000,

!************************* Model Summary ********************
!frame2|Cut-Extrude3,	Structural Steel,	matid,	1
!frame2|Thicken1,	Polycarbonate,	matid,	2
!frame2|Thicken3,	Polycarbonate,	matid,	3
!frame2|Mirror1,	TR90,	matid,	4
!frame2|Mirror3,	Structural Steel,	matid,	5
!handle1|Fillet1,	TR90,	matid,	6
!handle1|Boss-Extrude1,	Structural Steel,	matid,	7
!bolt|Boss-Extrude2,	Structural Steel,	matid,	8
!nut|Cut-Extrude1,	Structural Steel,	matid,	9
!bolt|Boss-Extrude2[2],	Structural Steel,	matid,	10
!nut|Cut-Extrude1[2],	Structural Steel,	matid,	11
!handle2|Fillet1,	Structural Steel,	matid,	12
!handle2|Boss-Extrude1,	Structural Steel,	matid,	13
!************************* End Model Summary ********************
/com,*********** Create Contact "Contact Region" ***********
*set,tid,15
*set,cid,14
r,tid
r,cid
et,tid,170
et,cid,174
eblock,10,,,4
(15i9)
    63039       15       15       15        0      399      392      400      400      493      494      400      518
    63040       15       15       15        0      385      399      380      380      475      458      380      455
    63041       15       15       15        0      400      392      393      393      494      492      393      497
    63042       15       15       15        0      380      399      400      400      458      518      400      459
-1
eblock,10,,,4
(15i9)
    63043       14       14       14        0      399      392      400      400      493      494      400      518
    63044       14       14       14        0      385      399      380      380      475      458      380      455
    63045       14       14       14        0      400      392      393      393      494      492      393      497
    63046       14       14       14        0      380      399      400      400      458      518      400      459
-1
eblock,10,,,15
(15i9)
    63047       14       15       14        0    57471    59243    57472    57472    67608    67612    57472    67607
    63048       14       15       14        0    57440    57465    59243    59243    67464    67584    59243    67467
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-1
eblock,10,,,15
(15i9)
    63062       15       14       15        0    57471    59243    57472    57472    67608    67612    57472    67607
    63063       15       14       15        0    57440    57465    59243    59243    67464    67584    59243    67467
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-1
keyo,cid,8,2               ! auto create asymmetric contact (from Program Controlled setting)
keyo,cid,10,0              ! adjust contact stiffness each NR iteration (from Program Controlled setting)
keyo,cid,12,5              ! bonded always
keyo,cid,18,1              ! small sliding turned on by application
keyo,cid,2,0               ! augmented Lagrange (from Program Controlled setting)
keyo,cid,4,0               ! on Gauss point (from Program Controlled setting)
keyo,cid,9,1               ! ignore initial gaps/penetration
keyo,cid,7,0               ! No Prediction
rmod,tid,3,10.      ! FKN
rmod,tid,5,0.       ! ICONT
rmod,tid,6,0.       ! PINB
rmod,tid,10,0.      ! CNOF
rmod,tid,12,0.      ! FKT
rmod,tid,36,62      ! WB DSID
rmod,cid,3,10.      ! FKN
rmod,cid,5,0.       ! ICONT
rmod,cid,6,0.       ! PINB
rmod,cid,10,0.      ! CNOF
rmod,cid,12,0.      ! FKT
rmod,cid,36,62      ! WB DSID
/com,*********** Create Contact "Contact Region 2" ***********
*set,tid,17
*set,cid,16
r,tid
r,cid
et,tid,170
et,cid,174
eblock,10,,,7
(15i9)
    63077       17       17       17        0      384      386      381      381      471      463      381      462
    63078       17       17       17        0      386      387      383      383      476      470      383      469
    63079       17       17       17        0      387      388      382      382      477      468      382      467
    63080       17       17       17        0      388      385      380      380      473      455      380      456
    63081       17       17       17        0      380      382      388      388      454      468      388      456
    63082       17       17       17        0      382      383      387      387      466      470      387      467
    63083       17       17       17        0      383      381      386      386      461      463      386      469
-1
eblock,10,,,7
(15i9)
    63084       16       16       16        0      384      386      381      381      471      463      381      462
    63085       16       16       16        0      386      387      383      383      476      470      383      469
    63086       16       16       16        0      387      388      382      382      477      468      382      467
    63087       16       16       16        0      388      385      380      380      473      455      380      456
    63088       16       16       16        0      380      382      388      388      454      468      388      456
    63089       16       16       16        0      382      383      387      387      466      470      387      467
    63090       16       16       16        0      383      381      386      386      461      463      386      469
-1
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eblock,10,,,7
(15i9)
    63098       17       16       17        0     1808     1814     1813     1813     5450     5474     1813     5449
    63099       17       16       17        0     1811     1812     2755     2755     5461     5472     2755     5464
    63100       17       16       17        0     1814     1815     2755     2755     5478     5488     2755     5482
    63101       17       16       17        0     1812     1813     2755     2755     5468     5476     2755     5472
    63102       17       16       17        0     1813     1814     2755     2755     5474     5482     2755     5476
    63103       17       16       17        0     1810     1811     2758     2758     5456     5465     2758     5459
    63104       17       16       17        0     1811     2755     2758     2758     5464    10312     2758     5465
-1
keyo,cid,8,2               ! auto create asymmetric contact (from Program Controlled setting)
keyo,cid,10,0              ! adjust contact stiffness each NR iteration (from Program Controlled setting)
keyo,cid,12,5              ! bonded always
keyo,cid,18,1              ! small sliding turned on by application
keyo,cid,2,0               ! augmented Lagrange (from Program Controlled setting)
keyo,cid,4,0               ! on Gauss point (from Program Controlled setting)
keyo,cid,9,1               ! ignore initial gaps/penetration
keyo,cid,7,0               ! No Prediction
rmod,tid,3,10.      ! FKN
rmod,tid,5,0.       ! ICONT
rmod,tid,6,0.       ! PINB
rmod,tid,10,0.      ! CNOF
rmod,tid,12,0.      ! FKT
rmod,tid,36,65      ! WB DSID
rmod,cid,3,10.      ! FKN
rmod,cid,5,0.       ! ICONT
rmod,cid,6,0.       ! PINB
rmod,cid,10,0.      ! CNOF
rmod,cid,12,0.      ! FKT
rmod,cid,36,65      ! WB DSID
/com,*********** Create Contact "Contact Region 3" ***********
*set,tid,19
*set,cid,18
r,tid
r,cid
et,tid,170
et,cid,174
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eblock,10,,,38
(15i9)
    63229       19       18       19        0        1        5        3        3       34       48        3       33
    63230       19       18       19        0        4        7        8        8       56       76        8       57
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-1
keyo,cid,8,2               ! auto create asymmetric contact (from Program Controlled setting)
keyo,cid,10,0              ! adjust contact stiffness each NR iteration (from Program Controlled setting)
keyo,cid,12,5              ! bonded always
keyo,cid,18,1              ! small sliding turned on by application
keyo,cid,2,0               ! augmented Lagrange (from Program Controlled setting)
keyo,cid,4,0               ! on Gauss point (from Program Controlled setting)
keyo,cid,9,1               ! ignore initial gaps/penetration
keyo,cid,7,0               ! No Prediction
rmod,tid,3,10.      ! FKN
rmod,tid,5,0.       ! ICONT
rmod,tid,6,0.       ! PINB
rmod,tid,10,0.      ! CNOF
rmod,tid,12,0.      ! FKT
rmod,tid,36,68      ! WB DSID
rmod,cid,3,10.      ! FKN
rmod,cid,5,0.       ! ICONT
rmod,cid,6,0.       ! PINB
rmod,cid,10,0.      ! CNOF
rmod,cid,12,0.      ! FKT
rmod,cid,36,68      ! WB DSID
/com,*********** Create Contact "Contact Region 4" ***********
*set,tid,21
*set,cid,20
r,tid
r,cid
et,tid,170
et,cid,174
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eblock,10,,,62
(15i9)
    63393       21       20       21        0     1178     1158     1194     1194     1245     1247     1194     1364
    63394       21       20       21        0     1155     1178     1177     1177     1223     1357     1177     1222
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-1
keyo,cid,8,2               ! auto create asymmetric contact (from Program Controlled setting)
keyo,cid,10,0              ! adjust contact stiffness each NR iteration (from Program Controlled setting)
keyo,cid,12,5              ! bonded always
keyo,cid,18,1              ! small sliding turned on by application
keyo,cid,2,0               ! augmented Lagrange (from Program Controlled setting)
keyo,cid,4,0               ! on Gauss point (from Program Controlled setting)
keyo,cid,9,1               ! ignore initial gaps/penetration
keyo,cid,7,0               ! No Prediction
rmod,tid,3,10.      ! FKN
rmod,tid,5,0.       ! ICONT
rmod,tid,6,0.       ! PINB
rmod,tid,10,0.      ! CNOF
rmod,tid,12,0.      ! FKT
rmod,tid,36,71      ! WB DSID
rmod,cid,3,10.      ! FKN
rmod,cid,5,0.       ! ICONT
rmod,cid,6,0.       ! PINB
rmod,cid,10,0.      ! CNOF
rmod,cid,12,0.      ! FKT
rmod,cid,36,71      ! WB DSID
/com,*********** Create Contact "Contact Region 5" ***********
*set,tid,23
*set,cid,22
r,tid
r,cid
et,tid,170
et,cid,174
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eblock,10,,,443
(15i9)
    64486       23       22       23        0    56793    56794    58974    58974    64060    64070    58974    64064
    64487       23       22       23        0    57252    58981    58979    58979    66442    75341    58979    66441
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-1
keyo,cid,8,2               ! auto create asymmetric contact (from Program Controlled setting)
keyo,cid,10,0              ! adjust contact stiffness each NR iteration (from Program Controlled setting)
keyo,cid,12,5              ! bonded always
keyo,cid,18,1              ! small sliding turned on by application
keyo,cid,2,0               ! augmented Lagrange (from Program Controlled setting)
keyo,cid,4,0               ! on Gauss point (from Program Controlled setting)
keyo,cid,9,1               ! ignore initial gaps/penetration
keyo,cid,7,0               ! No Prediction
rmod,tid,3,10.      ! FKN
rmod,tid,5,0.       ! ICONT
rmod,tid,6,0.       ! PINB
rmod,tid,10,0.      ! CNOF
rmod,tid,12,0.      ! FKT
rmod,tid,36,74      ! WB DSID
rmod,cid,3,10.      ! FKN
rmod,cid,5,0.       ! ICONT
rmod,cid,6,0.       ! PINB
rmod,cid,10,0.      ! CNOF
rmod,cid,12,0.      ! FKT
rmod,cid,36,74      ! WB DSID
/com,*********** Create Contact "Contact Region 6" ***********
*set,tid,25
*set,cid,24
r,tid
r,cid
et,tid,170
et,cid,174
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eblock,10,,,443
(15i9)
    65960       25       24       25        0    57386    57107    58919    58919    65665    65668    58919    67147
    65961       25       24       25        0    58921    57103    58920    58920    65647    65646    58920    75135
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-1
keyo,cid,8,2               ! auto create asymmetric contact (from Program Controlled setting)
keyo,cid,10,0              ! adjust contact stiffness each NR iteration (from Program Controlled setting)
keyo,cid,12,5              ! bonded always
keyo,cid,18,1              ! small sliding turned on by application
keyo,cid,2,0               ! augmented Lagrange (from Program Controlled setting)
keyo,cid,4,0               ! on Gauss point (from Program Controlled setting)
keyo,cid,9,1               ! ignore initial gaps/penetration
keyo,cid,7,0               ! No Prediction
rmod,tid,3,10.      ! FKN
rmod,tid,5,0.       ! ICONT
rmod,tid,6,0.       ! PINB
rmod,tid,10,0.      ! CNOF
rmod,tid,12,0.      ! FKT
rmod,tid,36,77      ! WB DSID
rmod,cid,3,10.      ! FKN
rmod,cid,5,0.       ! ICONT
rmod,cid,6,0.       ! PINB
rmod,cid,10,0.      ! CNOF
rmod,cid,12,0.      ! FKT
rmod,cid,36,77      ! WB DSID
/com,*********** Create Contact "Contact Region 7" ***********
*set,tid,27
*set,cid,26
r,tid
r,cid
et,tid,170
et,cid,174
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eblock,10,,,4
(15i9)
    66437       27       26       27        0      555      554      548      548      672      661      548      662
    66438       27       26       27        0      555      543      554      554      644      643      554      672
    66439       27       26       27        0      554      543      540      540      643      627      540      631
    66440       27       26       27        0      548      554      547      547      661      657      547      656
-1
keyo,cid,8,2               ! auto create asymmetric contact (from Program Controlled setting)
keyo,cid,10,0              ! adjust contact stiffness each NR iteration (from Program Controlled setting)
keyo,cid,12,5              ! bonded always
keyo,cid,18,1              ! small sliding turned on by application
keyo,cid,2,0               ! augmented Lagrange (from Program Controlled setting)
keyo,cid,4,0               ! on Gauss point (from Program Controlled setting)
keyo,cid,9,1               ! ignore initial gaps/penetration
keyo,cid,7,0               ! No Prediction
rmod,tid,3,10.      ! FKN
rmod,tid,5,0.       ! ICONT
rmod,tid,6,0.       ! PINB
rmod,tid,10,0.      ! CNOF
rmod,tid,12,0.      ! FKT
rmod,tid,36,80      ! WB DSID
rmod,cid,3,10.      ! FKN
rmod,cid,5,0.       ! ICONT
rmod,cid,6,0.       ! PINB
rmod,cid,10,0.      ! CNOF
rmod,cid,12,0.      ! FKT
rmod,cid,36,80      ! WB DSID
/com,*********** Create Contact "Contact Region 8" ***********
*set,tid,29
*set,cid,28
r,tid
r,cid
et,tid,170
et,cid,174
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eblock,10,,,22
(15i9)
    66497       29       28       29        0     1812     1996     2547     2547     5469     6537     2547     5471
    66498       29       28       29        0     1812     2547     1813     1813     5471     5475     1813     5468
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-1
keyo,cid,8,2               ! auto create asymmetric contact (from Program Controlled setting)
keyo,cid,10,0              ! adjust contact stiffness each NR iteration (from Program Controlled setting)
keyo,cid,12,5              ! bonded always
keyo,cid,18,1              ! small sliding turned on by application
keyo,cid,2,0               ! augmented Lagrange (from Program Controlled setting)
keyo,cid,4,0               ! on Gauss point (from Program Controlled setting)
keyo,cid,9,1               ! ignore initial gaps/penetration
keyo,cid,7,0               ! No Prediction
rmod,tid,3,10.      ! FKN
rmod,tid,5,0.       ! ICONT
rmod,tid,6,0.       ! PINB
rmod,tid,10,0.      ! CNOF
rmod,tid,12,0.      ! FKT
rmod,tid,36,83      ! WB DSID
rmod,cid,3,10.      ! FKN
rmod,cid,5,0.       ! ICONT
rmod,cid,6,0.       ! PINB
rmod,cid,10,0.      ! CNOF
rmod,cid,12,0.      ! FKT
rmod,cid,36,83      ! WB DSID
/com,*********** Create Contact "Contact Region 9" ***********
*set,tid,31
*set,cid,30
r,tid
r,cid
et,tid,170
et,cid,174
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eblock,10,,,12
(15i9)
    66565       31       30       31        0       11       14       16       16       96      106       16       97
    66566       31       30       31        0       12       11       16       16       95       97       16      100
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-1
keyo,cid,8,2               ! auto create asymmetric contact (from Program Controlled setting)
keyo,cid,10,0              ! adjust contact stiffness each NR iteration (from Program Controlled setting)
keyo,cid,12,5              ! bonded always
keyo,cid,18,1              ! small sliding turned on by application
keyo,cid,2,0               ! augmented Lagrange (from Program Controlled setting)
keyo,cid,4,0               ! on Gauss point (from Program Controlled setting)
keyo,cid,9,1               ! ignore initial gaps/penetration
keyo,cid,7,0               ! No Prediction
rmod,tid,3,10.      ! FKN
rmod,tid,5,0.       ! ICONT
rmod,tid,6,0.       ! PINB
rmod,tid,10,0.      ! CNOF
rmod,tid,12,0.      ! FKT
rmod,tid,36,86      ! WB DSID
rmod,cid,3,10.      ! FKN
rmod,cid,5,0.       ! ICONT
rmod,cid,6,0.       ! PINB
rmod,cid,10,0.      ! CNOF
rmod,cid,12,0.      ! FKT
rmod,cid,36,86      ! WB DSID
/com,*********** Create Contact "Contact Region 10" ***********
*set,tid,33
*set,cid,32
r,tid
r,cid
et,tid,170
et,cid,174
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eblock,10,,,19
(15i9)
    66614       33       32       33        0     1157     1188     1181     1181     1240     1375     1181     1239
    66615       33       32       33        0     1188     1173     1191     1191     1339     1341     1191     1383
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-1
keyo,cid,8,2               ! auto create asymmetric contact (from Program Controlled setting)
keyo,cid,10,0              ! adjust contact stiffness each NR iteration (from Program Controlled setting)
keyo,cid,12,5              ! bonded always
keyo,cid,18,1              ! small sliding turned on by application
keyo,cid,2,0               ! augmented Lagrange (from Program Controlled setting)
keyo,cid,4,0               ! on Gauss point (from Program Controlled setting)
keyo,cid,9,1               ! ignore initial gaps/penetration
keyo,cid,7,0               ! No Prediction
rmod,tid,3,10.      ! FKN
rmod,tid,5,0.       ! ICONT
rmod,tid,6,0.       ! PINB
rmod,tid,10,0.      ! CNOF
rmod,tid,12,0.      ! FKT
rmod,tid,36,89      ! WB DSID
rmod,cid,3,10.      ! FKN
rmod,cid,5,0.       ! ICONT
rmod,cid,6,0.       ! PINB
rmod,cid,10,0.      ! CNOF
rmod,cid,12,0.      ! FKT
rmod,cid,36,89      ! WB DSID
/com,*********** Create Contact "Contact Region 11" ***********
*set,tid,35
*set,cid,34
r,tid
r,cid
et,tid,170
et,cid,174
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eblock,10,,,4
(15i9)
    66647       35       34       35        0      193      174      194      194      319      320      194      360
    66648       35       34       35        0      171      194      172      172      299      307      172      295
    66649       35       34       35        0      173      174      193      193      311      319      193      313
    66650       35       34       35        0      193      194      171      171      360      299      171      298
-1
keyo,cid,8,2               ! auto create asymmetric contact (from Program Controlled setting)
keyo,cid,10,0              ! adjust contact stiffness each NR iteration (from Program Controlled setting)
keyo,cid,12,5              ! bonded always
keyo,cid,18,1              ! small sliding turned on by application
keyo,cid,2,0               ! augmented Lagrange (from Program Controlled setting)
keyo,cid,4,0               ! on Gauss point (from Program Controlled setting)
keyo,cid,9,1               ! ignore initial gaps/penetration
keyo,cid,7,0               ! No Prediction
rmod,tid,3,10.      ! FKN
rmod,tid,5,0.       ! ICONT
rmod,tid,6,0.       ! PINB
rmod,tid,10,0.      ! CNOF
rmod,tid,12,0.      ! FKT
rmod,tid,36,92      ! WB DSID
rmod,cid,3,10.      ! FKN
rmod,cid,5,0.       ! ICONT
rmod,cid,6,0.       ! PINB
rmod,cid,10,0.      ! CNOF
rmod,cid,12,0.      ! FKT
rmod,cid,36,92      ! WB DSID
/com,*********** Create Contact "Contact Region 12" ***********
*set,tid,37
*set,cid,36
r,tid
r,cid
et,tid,170
et,cid,174
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eblock,10,,,22
(15i9)
    66691       37       36       37        0      923      903      939      939      990      992      939     1109
    66692       37       36       37        0      900      923      922      922      968     1102      922      967
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-1
keyo,cid,8,2               ! auto create asymmetric contact (from Program Controlled setting)
keyo,cid,10,0              ! adjust contact stiffness each NR iteration (from Program Controlled setting)
keyo,cid,12,5              ! bonded always
keyo,cid,18,1              ! small sliding turned on by application
keyo,cid,2,0               ! augmented Lagrange (from Program Controlled setting)
keyo,cid,4,0               ! on Gauss point (from Program Controlled setting)
keyo,cid,9,1               ! ignore initial gaps/penetration
keyo,cid,7,0               ! No Prediction
rmod,tid,3,10.      ! FKN
rmod,tid,5,0.       ! ICONT
rmod,tid,6,0.       ! PINB
rmod,tid,10,0.      ! CNOF
rmod,tid,12,0.      ! FKT
rmod,tid,36,95      ! WB DSID
rmod,cid,3,10.      ! FKN
rmod,cid,5,0.       ! ICONT
rmod,cid,6,0.       ! PINB
rmod,cid,10,0.      ! CNOF
rmod,cid,12,0.      ! FKT
rmod,cid,36,95      ! WB DSID
/com,*********** Create Contact "Contact Region 13" ***********
*set,tid,39
*set,cid,38
r,tid
r,cid
et,tid,170
et,cid,174
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eblock,10,,,4
(15i9)
    66727       39       38       39        0      712      692      713      713      799      800      713      879
    66728       39       38       39        0      713      692      693      693      800      794      693      805
    66729       39       38       39        0      689      712      690      690      779      786      690      775
    66730       39       38       39        0      690      712      713      713      786      879      713      787
-1
keyo,cid,8,2               ! auto create asymmetric contact (from Program Controlled setting)
keyo,cid,10,0              ! adjust contact stiffness each NR iteration (from Program Controlled setting)
keyo,cid,12,5              ! bonded always
keyo,cid,18,1              ! small sliding turned on by application
keyo,cid,2,0               ! augmented Lagrange (from Program Controlled setting)
keyo,cid,4,0               ! on Gauss point (from Program Controlled setting)
keyo,cid,9,1               ! ignore initial gaps/penetration
keyo,cid,7,0               ! No Prediction
rmod,tid,3,10.      ! FKN
rmod,tid,5,0.       ! ICONT
rmod,tid,6,0.       ! PINB
rmod,tid,10,0.      ! CNOF
rmod,tid,12,0.      ! FKT
rmod,tid,36,98      ! WB DSID
rmod,cid,3,10.      ! FKN
rmod,cid,5,0.       ! ICONT
rmod,cid,6,0.       ! PINB
rmod,cid,10,0.      ! CNOF
rmod,cid,12,0.      ! FKT
rmod,cid,36,98      ! WB DSID
/com,*********** Create Contact "Contact Region 14" ***********
*set,tid,41
*set,cid,40
r,tid
r,cid
et,tid,170
et,cid,174
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eblock,10,,,22
(15i9)
    66787       41       40       41        0    46715    46899    47450    47450    50372    51440    47450    50374
    66788       41       40       41        0    46715    47450    46716    46716    50374    50378    46716    50371
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-1
keyo,cid,8,2               ! auto create asymmetric contact (from Program Controlled setting)
keyo,cid,10,0              ! adjust contact stiffness each NR iteration (from Program Controlled setting)
keyo,cid,12,5              ! bonded always
keyo,cid,18,1              ! small sliding turned on by application
keyo,cid,2,0               ! augmented Lagrange (from Program Controlled setting)
keyo,cid,4,0               ! on Gauss point (from Program Controlled setting)
keyo,cid,9,1               ! ignore initial gaps/penetration
keyo,cid,7,0               ! No Prediction
rmod,tid,3,10.      ! FKN
rmod,tid,5,0.       ! ICONT
rmod,tid,6,0.       ! PINB
rmod,tid,10,0.      ! CNOF
rmod,tid,12,0.      ! FKT
rmod,tid,36,101     ! WB DSID
rmod,cid,3,10.      ! FKN
rmod,cid,5,0.       ! ICONT
rmod,cid,6,0.       ! PINB
rmod,cid,10,0.      ! CNOF
rmod,cid,12,0.      ! FKT
rmod,cid,36,101     ! WB DSID
/com,*********** Create Contact "Contact Region 15" ***********
*set,tid,43
*set,cid,42
r,tid
r,cid
et,tid,170
et,cid,174
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eblock,10,,,12
(15i9)
    66845       43       42       43        0    11159    11153    11162    11162    11241    11242    11162    11260
    66846       43       42       43        0    11160    11159    11162    11162    11259    11260    11162    11264
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-1
keyo,cid,8,2               ! auto create asymmetric contact (from Program Controlled setting)
keyo,cid,10,0              ! adjust contact stiffness each NR iteration (from Program Controlled setting)
keyo,cid,12,5              ! bonded always
keyo,cid,18,1              ! small sliding turned on by application
keyo,cid,2,0               ! augmented Lagrange (from Program Controlled setting)
keyo,cid,4,0               ! on Gauss point (from Program Controlled setting)
keyo,cid,9,1               ! ignore initial gaps/penetration
keyo,cid,7,0               ! No Prediction
rmod,tid,3,10.      ! FKN
rmod,tid,5,0.       ! ICONT
rmod,tid,6,0.       ! PINB
rmod,tid,10,0.      ! CNOF
rmod,tid,12,0.      ! FKT
rmod,tid,36,104     ! WB DSID
rmod,cid,3,10.      ! FKN
rmod,cid,5,0.       ! ICONT
rmod,cid,6,0.       ! PINB
rmod,cid,10,0.      ! CNOF
rmod,cid,12,0.      ! FKT
rmod,cid,36,104     ! WB DSID
/com,*********** Create Contact "Contact Region 16" ***********
*set,tid,45
*set,cid,44
r,tid
r,cid
et,tid,170
et,cid,174
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eblock,10,,,62
(15i9)
    66983       45       44       45        0      923      903      939      939      990      992      939     1109
    66984       45       44       45        0      900      923      922      922      968     1102      922      967
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-1
keyo,cid,8,2               ! auto create asymmetric contact (from Program Controlled setting)
keyo,cid,10,0              ! adjust contact stiffness each NR iteration (from Program Controlled setting)
keyo,cid,12,5              ! bonded always
keyo,cid,18,1              ! small sliding turned on by application
keyo,cid,2,0               ! augmented Lagrange (from Program Controlled setting)
keyo,cid,4,0               ! on Gauss point (from Program Controlled setting)
keyo,cid,9,1               ! ignore initial gaps/penetration
keyo,cid,7,0               ! No Prediction
rmod,tid,3,10.      ! FKN
rmod,tid,5,0.       ! ICONT
rmod,tid,6,0.       ! PINB
rmod,tid,10,0.      ! CNOF
rmod,tid,12,0.      ! FKT
rmod,tid,36,107     ! WB DSID
rmod,cid,3,10.      ! FKN
rmod,cid,5,0.       ! ICONT
rmod,cid,6,0.       ! PINB
rmod,cid,10,0.      ! CNOF
rmod,cid,12,0.      ! FKT
rmod,cid,36,107     ! WB DSID
/com,*********** Create Contact "Contact Region 17" ***********
*set,tid,47
*set,cid,46
r,tid
r,cid
et,tid,170
et,cid,174
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eblock,10,,,11
(15i9)
    67070       47       46       47        0    47567    47569    47570    47570    54675    54694    47570    54676
    67071       47       46       47        0    47567    47628    47569    47569    54679    54695    47569    54675
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-1
keyo,cid,8,2               ! auto create asymmetric contact (from Program Controlled setting)
keyo,cid,10,0              ! adjust contact stiffness each NR iteration (from Program Controlled setting)
keyo,cid,12,5              ! bonded always
keyo,cid,18,1              ! small sliding turned on by application
keyo,cid,2,0               ! augmented Lagrange (from Program Controlled setting)
keyo,cid,4,0               ! on Gauss point (from Program Controlled setting)
keyo,cid,9,1               ! ignore initial gaps/penetration
keyo,cid,7,0               ! No Prediction
rmod,tid,3,10.      ! FKN
rmod,tid,5,0.       ! ICONT
rmod,tid,6,0.       ! PINB
rmod,tid,10,0.      ! CNOF
rmod,tid,12,0.      ! FKT
rmod,tid,36,110     ! WB DSID
rmod,cid,3,10.      ! FKN
rmod,cid,5,0.       ! ICONT
rmod,cid,6,0.       ! PINB
rmod,cid,10,0.      ! CNOF
rmod,cid,12,0.      ! FKT
rmod,cid,36,110     ! WB DSID
/com,*********** Create Contact "Contact Region 18" ***********
*set,tid,49
*set,cid,48
r,tid
r,cid
et,tid,170
et,cid,174
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eblock,10,,,42
(15i9)
    67209       49       48       49        0    11141    11145    11143    11143    11173    11187    11143    11172
    67210       49       48       49        0    11144    11147    11148    11148    11194    11214    11148    11195
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-1
keyo,cid,8,2               ! auto create asymmetric contact (from Program Controlled setting)
keyo,cid,10,0              ! adjust contact stiffness each NR iteration (from Program Controlled setting)
keyo,cid,12,5              ! bonded always
keyo,cid,18,1              ! small sliding turned on by application
keyo,cid,2,0               ! augmented Lagrange (from Program Controlled setting)
keyo,cid,4,0               ! on Gauss point (from Program Controlled setting)
keyo,cid,9,1               ! ignore initial gaps/penetration
keyo,cid,7,0               ! No Prediction
rmod,tid,3,10.      ! FKN
rmod,tid,5,0.       ! ICONT
rmod,tid,6,0.       ! PINB
rmod,tid,10,0.      ! CNOF
rmod,tid,12,0.      ! FKT
rmod,tid,36,113     ! WB DSID
rmod,cid,3,10.      ! FKN
rmod,cid,5,0.       ! ICONT
rmod,cid,6,0.       ! PINB
rmod,cid,10,0.      ! CNOF
rmod,cid,12,0.      ! FKT
rmod,cid,36,113     ! WB DSID
/com,*********** Create Contact "Contact Region 19" ***********
*set,tid,51
*set,cid,50
r,tid
r,cid
et,tid,170
et,cid,174
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eblock,10,,,4
(15i9)
    67283       51       50       51        0       21       22       19       19      138      130       19      129
    67284       51       50       51        0       20       14        9        9      107       86        9       87
    67285       51       50       51        0       22       14       20       20      108      107       20      133
    67286       51       50       51        0       19       22       20       20      130      133       20      128
-1
keyo,cid,8,2               ! auto create asymmetric contact (from Program Controlled setting)
keyo,cid,10,0              ! adjust contact stiffness each NR iteration (from Program Controlled setting)
keyo,cid,12,5              ! bonded always
keyo,cid,18,1              ! small sliding turned on by application
keyo,cid,2,0               ! augmented Lagrange (from Program Controlled setting)
keyo,cid,4,0               ! on Gauss point (from Program Controlled setting)
keyo,cid,9,1               ! ignore initial gaps/penetration
keyo,cid,7,0               ! No Prediction
rmod,tid,3,10.      ! FKN
rmod,tid,5,0.       ! ICONT
rmod,tid,6,0.       ! PINB
rmod,tid,10,0.      ! CNOF
rmod,tid,12,0.      ! FKT
rmod,tid,36,116     ! WB DSID
rmod,cid,3,10.      ! FKN
rmod,cid,5,0.       ! ICONT
rmod,cid,6,0.       ! PINB
rmod,cid,10,0.      ! CNOF
rmod,cid,12,0.      ! FKT
rmod,cid,36,116     ! WB DSID
/com,*********** Create Contact "Contact Region 20" ***********
*set,tid,53
*set,cid,52
r,tid
r,cid
et,tid,170
et,cid,174
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eblock,10,,,19
(15i9)
    67326       53       52       53        0     1157     1188     1181     1181     1240     1375     1181     1239
    67327       53       52       53        0     1188     1173     1191     1191     1339     1341     1191     1383
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-1
keyo,cid,8,2               ! auto create asymmetric contact (from Program Controlled setting)
keyo,cid,10,0              ! adjust contact stiffness each NR iteration (from Program Controlled setting)
keyo,cid,12,5              ! bonded always
keyo,cid,18,1              ! small sliding turned on by application
keyo,cid,2,0               ! augmented Lagrange (from Program Controlled setting)
keyo,cid,4,0               ! on Gauss point (from Program Controlled setting)
keyo,cid,9,1               ! ignore initial gaps/penetration
keyo,cid,7,0               ! No Prediction
rmod,tid,3,10.      ! FKN
rmod,tid,5,0.       ! ICONT
rmod,tid,6,0.       ! PINB
rmod,tid,10,0.      ! CNOF
rmod,tid,12,0.      ! FKT
rmod,tid,36,119     ! WB DSID
rmod,cid,3,10.      ! FKN
rmod,cid,5,0.       ! ICONT
rmod,cid,6,0.       ! PINB
rmod,cid,10,0.      ! CNOF
rmod,cid,12,0.      ! FKT
rmod,cid,36,119     ! WB DSID
/com,*********** Create Contact "Contact Region 21" ***********
*set,tid,55
*set,cid,54
r,tid
r,cid
et,tid,170
et,cid,174
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eblock,10,,,4
(15i9)
    67367       55       54       55        0      193      174      194      194      319      320      194      360
    67368       55       54       55        0      171      194      172      172      299      307      172      295
    67369       55       54       55        0      173      174      193      193      311      319      193      313
    67370       55       54       55        0      193      194      171      171      360      299      171      298
-1
keyo,cid,8,2               ! auto create asymmetric contact (from Program Controlled setting)
keyo,cid,10,0              ! adjust contact stiffness each NR iteration (from Program Controlled setting)
keyo,cid,12,5              ! bonded always
keyo,cid,18,1              ! small sliding turned on by application
keyo,cid,2,0               ! augmented Lagrange (from Program Controlled setting)
keyo,cid,4,0               ! on Gauss point (from Program Controlled setting)
keyo,cid,9,1               ! ignore initial gaps/penetration
keyo,cid,7,0               ! No Prediction
rmod,tid,3,10.      ! FKN
rmod,tid,5,0.       ! ICONT
rmod,tid,6,0.       ! PINB
rmod,tid,10,0.      ! CNOF
rmod,tid,12,0.      ! FKT
rmod,tid,36,122     ! WB DSID
rmod,cid,3,10.      ! FKN
rmod,cid,5,0.       ! ICONT
rmod,cid,6,0.       ! PINB
rmod,cid,10,0.      ! CNOF
rmod,cid,12,0.      ! FKT
rmod,cid,36,122     ! WB DSID
/com,*********** Create Contact "Contact Region 22" ***********
*set,tid,57
*set,cid,56
r,tid
r,cid
et,tid,170
et,cid,174
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eblock,10,,,38
(15i9)
    67433       57       56       57        0     1178     1158     1194     1194     1245     1247     1194     1364
    67434       57       56       57        0     1155     1178     1177     1177     1223     1357     1177     1222
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-1
keyo,cid,8,2               ! auto create asymmetric contact (from Program Controlled setting)
keyo,cid,10,0              ! adjust contact stiffness each NR iteration (from Program Controlled setting)
keyo,cid,12,5              ! bonded always
keyo,cid,18,1              ! small sliding turned on by application
keyo,cid,2,0               ! augmented Lagrange (from Program Controlled setting)
keyo,cid,4,0               ! on Gauss point (from Program Controlled setting)
keyo,cid,9,1               ! ignore initial gaps/penetration
keyo,cid,7,0               ! No Prediction
rmod,tid,3,10.      ! FKN
rmod,tid,5,0.       ! ICONT
rmod,tid,6,0.       ! PINB
rmod,tid,10,0.      ! CNOF
rmod,tid,12,0.      ! FKT
rmod,tid,36,125     ! WB DSID
rmod,cid,3,10.      ! FKN
rmod,cid,5,0.       ! ICONT
rmod,cid,6,0.       ! PINB
rmod,cid,10,0.      ! CNOF
rmod,cid,12,0.      ! FKT
rmod,cid,36,125     ! WB DSID
/com,*********** Create Contact "Contact Region 23" ***********
*set,tid,59
*set,cid,58
r,tid
r,cid
et,tid,170
et,cid,174
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eblock,10,,,68
(15i9)
    67623       59       58       59        0      179      155      182      182      206      207      182      341
    67624       59       58       59        0      157      179      161      161      218      234      161      215
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-1
keyo,cid,8,2               ! auto create asymmetric contact (from Program Controlled setting)
keyo,cid,10,0              ! adjust contact stiffness each NR iteration (from Program Controlled setting)
keyo,cid,12,5              ! bonded always
keyo,cid,18,1              ! small sliding turned on by application
keyo,cid,2,0               ! augmented Lagrange (from Program Controlled setting)
keyo,cid,4,0               ! on Gauss point (from Program Controlled setting)
keyo,cid,9,1               ! ignore initial gaps/penetration
keyo,cid,7,0               ! No Prediction
rmod,tid,3,10.      ! FKN
rmod,tid,5,0.       ! ICONT
rmod,tid,6,0.       ! PINB
rmod,tid,10,0.      ! CNOF
rmod,tid,12,0.      ! FKT
rmod,tid,36,128     ! WB DSID
rmod,cid,3,10.      ! FKN
rmod,cid,5,0.       ! ICONT
rmod,cid,6,0.       ! PINB
rmod,cid,10,0.      ! CNOF
rmod,cid,12,0.      ! FKT
rmod,cid,36,128     ! WB DSID
/com,*********** Create Contact "Contact Region 24" ***********
*set,tid,61
*set,cid,60
r,tid
r,cid
et,tid,170
et,cid,174
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eblock,10,,,24
(15i9)
    67791       61       60       61        0      179      155      182      182      206      207      182      341
    67792       61       60       61        0      157      179      161      161      218      234      161      215
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-1
keyo,cid,8,2               ! auto create asymmetric contact (from Program Controlled setting)
keyo,cid,10,0              ! adjust contact stiffness each NR iteration (from Program Controlled setting)
keyo,cid,12,5              ! bonded always
keyo,cid,18,1              ! small sliding turned on by application
keyo,cid,2,0               ! augmented Lagrange (from Program Controlled setting)
keyo,cid,4,0               ! on Gauss point (from Program Controlled setting)
keyo,cid,9,1               ! ignore initial gaps/penetration
keyo,cid,7,0               ! No Prediction
rmod,tid,3,10.      ! FKN
rmod,tid,5,0.       ! ICONT
rmod,tid,6,0.       ! PINB
rmod,tid,10,0.      ! CNOF
rmod,tid,12,0.      ! FKT
rmod,tid,36,131     ! WB DSID
rmod,cid,3,10.      ! FKN
rmod,cid,5,0.       ! ICONT
rmod,cid,6,0.       ! PINB
rmod,cid,10,0.      ! CNOF
rmod,cid,12,0.      ! FKT
rmod,cid,36,131     ! WB DSID
/com,*********** Create Contact "Contact Region 25" ***********
*set,tid,63
*set,cid,62
r,tid
r,cid
et,tid,170
et,cid,174
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eblock,10,,,24
(15i9)
    67915       63       62       63        0      704      680      707      707      731      732      707      866
    67916       63       62       63        0      682      704      686      686      743      759      686      740
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-1
keyo,cid,8,2               ! auto create asymmetric contact (from Program Controlled setting)
keyo,cid,10,0              ! adjust contact stiffness each NR iteration (from Program Controlled setting)
keyo,cid,12,5              ! bonded always
keyo,cid,18,1              ! small sliding turned on by application
keyo,cid,2,0               ! augmented Lagrange (from Program Controlled setting)
keyo,cid,4,0               ! on Gauss point (from Program Controlled setting)
keyo,cid,9,1               ! ignore initial gaps/penetration
keyo,cid,7,0               ! No Prediction
rmod,tid,3,10.      ! FKN
rmod,tid,5,0.       ! ICONT
rmod,tid,6,0.       ! PINB
rmod,tid,10,0.      ! CNOF
rmod,tid,12,0.      ! FKT
rmod,tid,36,134     ! WB DSID
rmod,cid,3,10.      ! FKN
rmod,cid,5,0.       ! ICONT
rmod,cid,6,0.       ! PINB
rmod,cid,10,0.      ! CNOF
rmod,cid,12,0.      ! FKT
rmod,cid,36,134     ! WB DSID
/com,*********** Create Contact "Contact Region 26" ***********
*set,tid,65
*set,cid,64
r,tid
r,cid
et,tid,170
et,cid,174
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eblock,10,,,13
(15i9)
    67996       65       64       65        0    47567    47569    47570    47570    54675    54694    47570    54676
    67997       65       64       65        0    47567    47628    47569    47569    54679    54695    47569    54675
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-1
keyo,cid,8,2               ! auto create asymmetric contact (from Program Controlled setting)
keyo,cid,10,0              ! adjust contact stiffness each NR iteration (from Program Controlled setting)
keyo,cid,12,5              ! bonded always
keyo,cid,18,1              ! small sliding turned on by application
keyo,cid,2,0               ! augmented Lagrange (from Program Controlled setting)
keyo,cid,4,0               ! on Gauss point (from Program Controlled setting)
keyo,cid,9,1               ! ignore initial gaps/penetration
keyo,cid,7,0               ! No Prediction
rmod,tid,3,10.      ! FKN
rmod,tid,5,0.       ! ICONT
rmod,tid,6,0.       ! PINB
rmod,tid,10,0.      ! CNOF
rmod,tid,12,0.      ! FKT
rmod,tid,36,137     ! WB DSID
rmod,cid,3,10.      ! FKN
rmod,cid,5,0.       ! ICONT
rmod,cid,6,0.       ! PINB
rmod,cid,10,0.      ! CNOF
rmod,cid,12,0.      ! FKT
rmod,cid,36,137     ! WB DSID
/com,*********** Create Contact "Contact Region 27" ***********
*set,tid,67
*set,cid,66
r,tid
r,cid
et,tid,170
et,cid,174
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eblock,10,,,12
(15i9)
    68097       67       66       67        0    11141    11145    11143    11143    11173    11187    11143    11172
    68098       67       66       67        0    11144    11147    11148    11148    11194    11214    11148    11195
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-1
keyo,cid,8,2               ! auto create asymmetric contact (from Program Controlled setting)
keyo,cid,10,0              ! adjust contact stiffness each NR iteration (from Program Controlled setting)
keyo,cid,12,5              ! bonded always
keyo,cid,18,1              ! small sliding turned on by application
keyo,cid,2,0               ! augmented Lagrange (from Program Controlled setting)
keyo,cid,4,0               ! on Gauss point (from Program Controlled setting)
keyo,cid,9,1               ! ignore initial gaps/penetration
keyo,cid,7,0               ! No Prediction
rmod,tid,3,10.      ! FKN
rmod,tid,5,0.       ! ICONT
rmod,tid,6,0.       ! PINB
rmod,tid,10,0.      ! CNOF
rmod,tid,12,0.      ! FKT
rmod,tid,36,140     ! WB DSID
rmod,cid,3,10.      ! FKN
rmod,cid,5,0.       ! ICONT
rmod,cid,6,0.       ! PINB
rmod,cid,10,0.      ! CNOF
rmod,cid,12,0.      ! FKT
rmod,cid,36,140     ! WB DSID
/com,*********** Create Contact "Contact Region 28" ***********
*set,tid,69
*set,cid,68
r,tid
r,cid
et,tid,170
et,cid,174
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eblock,10,,,12
(15i9)
    68129       69       68       69        0    47567    47569    47570    47570    54675    54694    47570    54676
    68130       69       68       69        0    47567    47628    47569    47569    54679    54695    47569    54675
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-1
keyo,cid,8,2               ! auto create asymmetric contact (from Program Controlled setting)
keyo,cid,10,0              ! adjust contact stiffness each NR iteration (from Program Controlled setting)
keyo,cid,12,5              ! bonded always
keyo,cid,18,1              ! small sliding turned on by application
keyo,cid,2,0               ! augmented Lagrange (from Program Controlled setting)
keyo,cid,4,0               ! on Gauss point (from Program Controlled setting)
keyo,cid,9,1               ! ignore initial gaps/penetration
keyo,cid,7,0               ! No Prediction
rmod,tid,3,10.      ! FKN
rmod,tid,5,0.       ! ICONT
rmod,tid,6,0.       ! PINB
rmod,tid,10,0.      ! CNOF
rmod,tid,12,0.      ! FKT
rmod,tid,36,143     ! WB DSID
rmod,cid,3,10.      ! FKN
rmod,cid,5,0.       ! ICONT
rmod,cid,6,0.       ! PINB
rmod,cid,10,0.      ! CNOF
rmod,cid,12,0.      ! FKT
rmod,cid,36,143     ! WB DSID
/com,*********** Create Contact "Contact Region 29" ***********
*set,tid,71
*set,cid,70
r,tid
r,cid
et,tid,170
et,cid,174
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eblock,10,,,46
(15i9)
    68323       71       70       71        0    11141    11145    11143    11143    11173    11187    11143    11172
    68324       71       70       71        0    11144    11147    11148    11148    11194    11214    11148    11195
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-1
keyo,cid,8,2               ! auto create asymmetric contact (from Program Controlled setting)
keyo,cid,10,0              ! adjust contact stiffness each NR iteration (from Program Controlled setting)
keyo,cid,12,5              ! bonded always
keyo,cid,18,1              ! small sliding turned on by application
keyo,cid,2,0               ! augmented Lagrange (from Program Controlled setting)
keyo,cid,4,0               ! on Gauss point (from Program Controlled setting)
keyo,cid,9,1               ! ignore initial gaps/penetration
keyo,cid,7,0               ! No Prediction
rmod,tid,3,10.      ! FKN
rmod,tid,5,0.       ! ICONT
rmod,tid,6,0.       ! PINB
rmod,tid,10,0.      ! CNOF
rmod,tid,12,0.      ! FKT
rmod,tid,36,146     ! WB DSID
rmod,cid,3,10.      ! FKN
rmod,cid,5,0.       ! ICONT
rmod,cid,6,0.       ! PINB
rmod,cid,10,0.      ! CNOF
rmod,cid,12,0.      ! FKT
rmod,cid,36,146     ! WB DSID
/com,*********** Create Contact "Contact Region 30" ***********
*set,tid,73
*set,cid,72
r,tid
r,cid
et,tid,170
et,cid,174
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eblock,10,,,4
(15i9)
    68405       73       72       73        0    11158    11149    11156    11156    11226    11225    11156    11253
    68406       73       72       73        0    11157    11156    11155    11155    11252    11248    11155    11249
    68407       73       72       73        0    11158    11156    11157    11157    11253    11252    11157    11255
    68408       73       72       73        0    11152    11149    11158    11158    11224    11226    11158    11239
-1
keyo,cid,8,2               ! auto create asymmetric contact (from Program Controlled setting)
keyo,cid,10,0              ! adjust contact stiffness each NR iteration (from Program Controlled setting)
keyo,cid,12,5              ! bonded always
keyo,cid,18,1              ! small sliding turned on by application
keyo,cid,2,0               ! augmented Lagrange (from Program Controlled setting)
keyo,cid,4,0               ! on Gauss point (from Program Controlled setting)
keyo,cid,9,1               ! ignore initial gaps/penetration
keyo,cid,7,0               ! No Prediction
rmod,tid,3,10.      ! FKN
rmod,tid,5,0.       ! ICONT
rmod,tid,6,0.       ! PINB
rmod,tid,10,0.      ! CNOF
rmod,tid,12,0.      ! FKT
rmod,tid,36,149     ! WB DSID
rmod,cid,3,10.      ! FKN
rmod,cid,5,0.       ! ICONT
rmod,cid,6,0.       ! PINB
rmod,cid,10,0.      ! CNOF
rmod,cid,12,0.      ! FKT
rmod,cid,36,149     ! WB DSID
nsel,all
esel,all
/com,*********** Fixed Supports ***********
CMBLOCK,_FIXEDSU,NODE,     1866
(8i10)
      1626      1627      1628      1629      1630      1631      1632      1993
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cmsel,s,_FIXEDSU
d,all,all
nsel,all
/com,*********** Define Force Using Surface Effect Elements ***********
local,12,0,0.,0.,0.,0.,0.,0.
csys,0
et,74,154
mat,74
eblock,10,,,1987
(15i9)
    68409       74       74       74       12    56457    56458    58297    58297    62225    62231    58297    62226
    68410       74       74       74       12    56090    56089    58200    58200    60067    60068    58200    60072
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-1
esel,s,type,,74
keyop,74,2,1                ! Apply load in local coordinate system
keyop,74,7,1                ! Use original area so load is constant in large deformation
esel,all
fini
/com,****************************************************************************
/com,*************************    SOLUTION       ********************************
/com,****************************************************************************
/solu
antype,0                   ! static analysis
_thickRatio=  0     ! Ratio of thick parts in the model
eqsl,sparse,,,,,1
cntr,print,1               ! print out contact info and also make no initial contact an error
dmpoption,emat,no             ! Don't combine emat file for DANSYS
dmpoption,esav,no             ! Don't combine esav file for DANSYS
nldiag,cont,iter           ! print out contact info each equilibrium iteration
rescontrol,,none                 ! Do not keep any restart files
/com,****************************************************
/com,******************* SOLVE FOR LS 1 OF 1 ****************
esel,s,type,,74
nsle
sfe,all,1,pres,1,0.
sfe,all,2,pres,1,0.
sfe,all,3,pres,1,-8.61760818596875e-003
nsel,all
esel,all
nsub,1,1,1
time,1.
outres,erase
outres,all,none
outres,nsol,all,
outres,rsol,all
outres,eangl,all
outres,etmp,all
outres,veng,all
outres,strs,all,
outres,epel,all,
outres,eppl,all,
outres,cont,all,
! *********** WB SOLVE COMMAND ***********
! check interactive state
*get,ANSINTER_,active,,int
*if,ANSINTER_,ne,0,then
/eof
*endif
solve
/com *************** Write FE CONNECTORS *********
CEWRITE,file,ce,,INTE
/com,****************************************************
/com,*************** FINISHED SOLVE FOR LS 1 *************
*get,_NSOLTHREADS,active,0,ntfs
*get,_NSOLPROCESSES,active,0,npfs
/post1
fini
